/INPUT,3DBeam,txt,F:\ALMA_simulations\Tools\SVN_Dispersion\Models\,,0
/PREP7
EMATWRITE,YES
/output,DataAnsys/nodeCoor,txt
NLIST,ALL,,,XYZ,NODE,NODE,NODE
/output
/output,DataAnsys/nodeRest,txt
DLIST,ALL,
/output
/output,DataAnsys/elemTyp,txt
ETLIST,ALL,
/output
/output,DataAnsys/elemNodes,txt
ELIST,ALL,
/output
/output,DataAnsys/materialPro,txt
MPLIST,ALL,,,EVLT
/output
/SOLU
ANTYPE,MODAL
MODOPT,DAMP,1
MXPAND,1,,,YES
WRFULL,1
SOLVE
FINISH
/AUX2
file,,full
HBMAT,DataAnsys/HBMstiff,txt,,ascii,stiff,yes,yes
HBMAT,DataAnsys/HBMmass,txt,,ascii,mass,yes,yes
HBMAT,DataAnsys/HBMdamp,txt,,ascii,damp,yes,yes
FINISH
/AUX2
/output,DataAnsys/record_5,txt
form,long
fileaux2,,emat,F:\ALMA_simulations\Tools\SVN_Dispersion\Models\
dump,5,5
/output
FINISH
